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/BATCH
/COM,ANSYS RELEASE 2023 R2           BUILD 23.2      UP20230531       23:08:09
/COM,ANSYS RELEASE 2023 R2           BUILD 23.2      UP20230531       23:08:09
/COM,ANSYS RELEASE 2023 R2           BUILD 23.2      UP20230531       23:08:10
/BATCH
/COM,ANSYS RELEASE 2023 R2           BUILD 23.2      UP20230531       20:20:05
/COM,ANSYS RELEASE 2023 R2           BUILD 23.2      UP20230531       20:20:05
/COM,ANSYS RELEASE 2023 R2           BUILD 23.2      UP20230531       20:20:06
/BATCH
/COM,ANSYS RELEASE 2023 R2           BUILD 23.2      UP20230531       20:26:12
/COM,ANSYS RELEASE 2023 R2           BUILD 23.2      UP20230531       20:26:12
/COM,ANSYS RELEASE 2023 R2           BUILD 23.2      UP20230531       20:26:13
/BATCH
/COM,ANSYS RELEASE 2023 R2           BUILD 23.2      UP20230531       20:29:34
/COM,ANSYS RELEASE 2023 R2           BUILD 23.2      UP20230531       20:29:34
/COM,ANSYS RELEASE 2023 R2           BUILD 23.2      UP20230531       20:29:35
/BATCH
/COM,ANSYS RELEASE 2023 R2           BUILD 23.2      UP20230531       10:12:39
/COM,ANSYS RELEASE 2023 R2           BUILD 23.2      UP20230531       10:12:39
/COM,ANSYS RELEASE 2023 R2           BUILD 23.2      UP20230531       10:12:39
/BATCH
/COM,ANSYS RELEASE 2023 R2           BUILD 23.2      UP20230531       14:14:01
/COM,ANSYS RELEASE 2023 R2           BUILD 23.2      UP20230531       14:14:01
/COM,ANSYS RELEASE 2023 R2           BUILD 23.2      UP20230531       14:14:02
/BATCH
/COM,ANSYS RELEASE 2023 R2           BUILD 23.2      UP20230531       14:18:09
/input,menust,tmp,''
/GST,ON
/PLO,INFO,3
/GRO,CURL,ON
/CPLANE,1
WPSTYLE,,,,,,,,0
resume,OriginalModelResult,db
/COM,ANSYS RELEASE 2023 R2           BUILD 23.2      UP20230531       14:18:22
/POST1
SET,LAST
/DSCALE,ALL,1
/EFACET,1
PLNSOL, U,Z, 1,1.0
FINISH
! /EXIT,NOSAV
/BATCH
/COM,ANSYS RELEASE 2023 R2           BUILD 23.2      UP20230531       15:37:23
/COM,ANSYS RELEASE 2023 R2           BUILD 23.2      UP20230531       15:37:23
/COM,ANSYS RELEASE 2023 R2           BUILD 23.2      UP20230531       15:37:24
/BATCH
/COM,ANSYS RELEASE 2023 R2           BUILD 23.2      UP20230531       16:14:10
/COM,ANSYS RELEASE 2023 R2           BUILD 23.2      UP20230531       16:14:10
/BATCH
/COM,ANSYS RELEASE 2023 R2           BUILD 23.2      UP20230531       16:14:16
/COM,ANSYS RELEASE 2023 R2           BUILD 23.2      UP20230531       16:14:16
