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/BATCH
/COM,ANSYS RELEASE 2023 R2           BUILD 23.2      UP20230531       23:17:56
/COM,ANSYS RELEASE 2023 R2           BUILD 23.2      UP20230531       23:17:56
/COM,ANSYS RELEASE 2023 R2           BUILD 23.2      UP20230531       23:17:57
/BATCH
/COM,ANSYS RELEASE 2023 R2           BUILD 23.2      UP20230531       20:24:48
/COM,ANSYS RELEASE 2023 R2           BUILD 23.2      UP20230531       20:24:48
/COM,ANSYS RELEASE 2023 R2           BUILD 23.2      UP20230531       20:24:49
/BATCH
/COM,ANSYS RELEASE 2023 R2           BUILD 23.2      UP20230531       20:33:24
/COM,ANSYS RELEASE 2023 R2           BUILD 23.2      UP20230531       20:33:24
/COM,ANSYS RELEASE 2023 R2           BUILD 23.2      UP20230531       20:33:24
/BATCH
/COM,ANSYS RELEASE 2023 R2           BUILD 23.2      UP20230531       15:54:57
/COM,ANSYS RELEASE 2023 R2           BUILD 23.2      UP20230531       15:54:57
/COM,ANSYS RELEASE 2023 R2           BUILD 23.2      UP20230531       15:54:58
/BATCH
/COM,ANSYS RELEASE 2023 R2           BUILD 23.2      UP20230531       16:53:30
/COM,ANSYS RELEASE 2023 R2           BUILD 23.2      UP20230531       16:53:30
/BATCH
/COM,ANSYS RELEASE 2023 R2           BUILD 23.2      UP20230531       16:53:34
/COM,ANSYS RELEASE 2023 R2           BUILD 23.2      UP20230531       16:53:34
/BATCH
/COM,ANSYS RELEASE 2023 R2           BUILD 23.2      UP20230531       17:05:02
/input,menust,tmp,''
/GST,ON
/PLO,INFO,3
/GRO,CURL,ON
/CPLANE,1
WPSTYLE,,,,,,,,0
resume,OriginalModelResult.db
/COM,ANSYS RELEASE 2023 R2           BUILD 23.2      UP20230531       17:05:13
/POST1
SET,LAST
/EFACET,1
PLNSOL, U,Z, 1,1.0
/DSCALE,ALL,10
/EFACET,1
PLNSOL, U,Z, 1,1.0
/DSCALE,ALL,100
/EFACET,1
PLNSOL, U,Z, 1,1.0
etable,Myi,smisc,2
etable,Myj,smisc,15
plls,Myi,Myj
FINISH
! /EXIT,NOSAV
