! 材料名称: 主跨主梁girder
! 作用于以下Structure: Girder_1
mp,Ex,9,2.050000E+11
mp,prxy,9,3.100000E-01
mp,dens,9,8.005303E+03
mp,alpx,9,1.200000E-05

! 材料名称: 边跨主梁girder
! 作用于以下Structure: Girder_2, Girder_3
mp,Ex,10,2.050000E+11
mp,prxy,10,3.100000E-01
mp,dens,10,8.005303E+03
mp,alpx,10,1.200000E-05

! 材料名称: 锚碇girder
! 作用于以下Structure: Girder_4, Girder_5
mp,Ex,11,3.600000E+10
mp,prxy,11,2.000000E-01
mp,dens,11,2.549460E+03
mp,alpx,11,1.000000E-05

! 材料名称: 桥塔tower
! 作用于以下Structure: Tower_1, Tower_2
mp,Ex,12,3.600000E+10
mp,prxy,12,2.000000E-01
mp,dens,12,2.549460E+03
mp,alpx,12,1.000000E-05

! 材料名称: 刚臂rigid beam
! 作用于以下Structure: RigidBeam_1, RigidBeam_2, RigidBeam_3, RigidBeam_4, RigidBeam_5, RigidBeam_6, RigidBeam_7, RigidBeam_8, RigidBeam_9, RigidBeam_10, RigidBeam_11, RigidBeam_12, RigidBeam_13, RigidBeam_14
mp,Ex,13,1.000000E+15
mp,prxy,13,3.000000E-01
mp,dens,13,0.000000E+00
mp,alpx,13,0.000000E+00
