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/BATCH
/COM,ANSYS RELEASE 2023 R2           BUILD 23.2      UP20230531       00:48:46
/COM,ANSYS RELEASE 2023 R2           BUILD 23.2      UP20230531       00:48:46
/COM,ANSYS RELEASE 2023 R2           BUILD 23.2      UP20230531       00:48:46
/BATCH
/COM,ANSYS RELEASE 2023 R2           BUILD 23.2      UP20230531       00:49:23
/COM,ANSYS RELEASE 2023 R2           BUILD 23.2      UP20230531       00:49:23
/BATCH
/COM,ANSYS RELEASE 2023 R2           BUILD 23.2      UP20230531       00:49:27
/COM,ANSYS RELEASE 2023 R2           BUILD 23.2      UP20230531       00:49:27
/BATCH
/COM,ANSYS RELEASE 2023 R2           BUILD 23.2      UP20230531       00:55:14
/COM,ANSYS RELEASE 2023 R2           BUILD 23.2      UP20230531       00:55:14
/BATCH
/COM,ANSYS RELEASE 2023 R2           BUILD 23.2      UP20230531       00:55:18
/COM,ANSYS RELEASE 2023 R2           BUILD 23.2      UP20230531       00:55:18
/BATCH
/COM,ANSYS RELEASE 2023 R2           BUILD 23.2      UP20230531       00:56:16
/COM,ANSYS RELEASE 2023 R2           BUILD 23.2      UP20230531       00:56:16
/BATCH
/COM,ANSYS RELEASE 2023 R2           BUILD 23.2      UP20230531       00:56:20
/COM,ANSYS RELEASE 2023 R2           BUILD 23.2      UP20230531       00:56:20
/BATCH
/COM,ANSYS RELEASE 2023 R2           BUILD 23.2      UP20230531       16:39:10
/input,menust,tmp,''
/GST,ON
/PLO,INFO,3
/GRO,CURL,ON
/CPLANE,1
WPSTYLE,,,,,,,,0
resume,OriginalBridgeResult,db
/COM,ANSYS RELEASE 2023 R2           BUILD 23.2      UP20230531       16:39:41
resume,OriginalModelResult,db
/COM,ANSYS RELEASE 2023 R2           BUILD 23.2      UP20230531       16:39:48
/POST1
SET,LAST
etable,Myi,smisc,2
etable,Myj,smisc,15
plls,Myi,Myj
FINISH
! /EXIT,NOSAV
/BATCH
/COM,ANSYS RELEASE 2023 R2           BUILD 23.2      UP20230531       16:53:04
/COM,ANSYS RELEASE 2023 R2           BUILD 23.2      UP20230531       16:53:04
/COM,ANSYS RELEASE 2023 R2           BUILD 23.2      UP20230531       16:53:05
/BATCH
/COM,ANSYS RELEASE 2023 R2           BUILD 23.2      UP20230531       16:53:41
/input,menust,tmp,''
/GST,ON
/PLO,INFO,3
/GRO,CURL,ON
/CPLANE,1
WPSTYLE,,,,,,,,0
resume,OriginalModelResult,db
/COM,ANSYS RELEASE 2023 R2           BUILD 23.2      UP20230531       16:54:00
/POST1
SET,LAST
etable,Myi,smisc,2
etable,Myj,smisc,15
plls,Myi,Myj
FINISH
! /EXIT,NOSAV
/BATCH
/COM,ANSYS RELEASE 2023 R2           BUILD 23.2      UP20230531       16:55:07
/COM,ANSYS RELEASE 2023 R2           BUILD 23.2      UP20230531       16:55:07
/BATCH
/COM,ANSYS RELEASE 2023 R2           BUILD 23.2      UP20230531       16:55:12
/COM,ANSYS RELEASE 2023 R2           BUILD 23.2      UP20230531       16:55:12
/BATCH
/COM,ANSYS RELEASE 2023 R2           BUILD 23.2      UP20230531       20:29:33
/COM,ANSYS RELEASE 2023 R2           BUILD 23.2      UP20230531       20:29:33
/COM,ANSYS RELEASE 2023 R2           BUILD 23.2      UP20230531       20:29:33
/BATCH
/COM,ANSYS RELEASE 2023 R2           BUILD 23.2      UP20230531       21:41:20
/input,menust,tmp,''
/GST,ON
/PLO,INFO,3
/GRO,CURL,ON
/CPLANE,1
WPSTYLE,,,,,,,,0
main
/COM,ANSYS RELEASE 2023 R2           BUILD 23.2      UP20230531       21:41:26
/POST1
SET,LAST
etable,Myi,smisc,2
etable,Myj,smisc,15
plls,Myi,Myj
FINISH
! /EXIT,NOSAV
/BATCH
/COM,ANSYS RELEASE 2023 R2           BUILD 23.2      UP20230531       21:46:32
/COM,ANSYS RELEASE 2023 R2           BUILD 23.2      UP20230531       21:46:32
/COM,ANSYS RELEASE 2023 R2           BUILD 23.2      UP20230531       21:46:33
/BATCH
/COM,ANSYS RELEASE 2023 R2           BUILD 23.2      UP20230531       21:47:49
/COM,ANSYS RELEASE 2023 R2           BUILD 23.2      UP20230531       21:47:49
/BATCH
/COM,ANSYS RELEASE 2023 R2           BUILD 23.2      UP20230531       21:47:53
/COM,ANSYS RELEASE 2023 R2           BUILD 23.2      UP20230531       21:47:53
/BATCH
/COM,ANSYS RELEASE 2023 R2           BUILD 23.2      UP20230531       21:55:00
/COM,ANSYS RELEASE 2023 R2           BUILD 23.2      UP20230531       21:55:00
/COM,ANSYS RELEASE 2023 R2           BUILD 23.2      UP20230531       21:55:00
/BATCH
/COM,ANSYS RELEASE 2023 R2           BUILD 23.2      UP20230531       11:17:33
/COM,ANSYS RELEASE 2023 R2           BUILD 23.2      UP20230531       11:17:33
/COM,ANSYS RELEASE 2023 R2           BUILD 23.2      UP20230531       11:17:34
/BATCH
/COM,ANSYS RELEASE 2023 R2           BUILD 23.2      UP20230531       11:18:53
/COM,ANSYS RELEASE 2023 R2           BUILD 23.2      UP20230531       11:18:54
/BATCH
/COM,ANSYS RELEASE 2023 R2           BUILD 23.2      UP20230531       11:18:57
/COM,ANSYS RELEASE 2023 R2           BUILD 23.2      UP20230531       11:18:57
/BATCH
/COM,ANSYS RELEASE 2023 R2           BUILD 23.2      UP20230531       18:03:30
/COM,ANSYS RELEASE 2023 R2           BUILD 23.2      UP20230531       18:03:30
/COM,ANSYS RELEASE 2023 R2           BUILD 23.2      UP20230531       18:03:31
/BATCH
/COM,ANSYS RELEASE 2023 R2           BUILD 23.2      UP20230531       18:12:31
/COM,ANSYS RELEASE 2023 R2           BUILD 23.2      UP20230531       18:12:31
/BATCH
/COM,ANSYS RELEASE 2023 R2           BUILD 23.2      UP20230531       08:53:29
/COM,ANSYS RELEASE 2023 R2           BUILD 23.2      UP20230531       08:53:29
/BATCH
/COM,ANSYS RELEASE 2023 R2           BUILD 23.2      UP20230531       08:53:34
/COM,ANSYS RELEASE 2023 R2           BUILD 23.2      UP20230531       08:53:34
/BATCH
/COM,ANSYS RELEASE 2023 R2           BUILD 23.2      UP20230531       17:59:46
/input,menust,tmp,''
/GST,ON
/PLO,INFO,3
/GRO,CURL,ON
/CPLANE,1
WPSTYLE,,,,,,,,0
resume,OriginalModelREsult.db
/COM,ANSYS RELEASE 2023 R2           BUILD 23.2      UP20230531       18:00:08
/POST1
SET,LAST
/DSCALE,ALL,10
/EFACET,1
PLNSOL, U,X, 1,1.0
/DSCALE,ALL,100
/EFACET,1
PLNSOL, U,X, 1,1.0
FINISH
! /EXIT,NOSAV
